# Колебания без затухания при θ=10°
θ1 := [10 deg; 0]
ω1 := 3
θ2 := [10 deg; 0]
ω2 := 3
D1(t, θ) := [θ[1]; -(ω1^2)*sin(θ[0])]
D2(t, θ) := [θ[1]; -(ω2^2)*θ[0]]
Z1 := rkfixed(θ1, 0, 6, 1000, D1)
Z2 := rkfixed(θ2, 0, 6, 1000, D2)
t := Z1[:, 0]
θ1 := Z1[:, 1]
θ2 := Z2[:, 1]
θ1 := θ1*180/π
υ1 := Z1[:, 2]
θ2 := θ2*180/π
υ2 := Z2[:, 2]
# [plot: θ1, θ2 vs t]
# Колебания без затухания при θ=20°
θ3 := [20 deg; 0]
ω3 := 3
θ4 := [20 deg; 0]
ω4 := 3
D3(t, θ) := [θ[1]; -(ω3^2)*sin(θ[0])]
D4(t, θ) := [θ[1]; -(ω4^2)*θ[0]]
Z3 := rkfixed(θ3, 0, 6, 1000, D3)
Z4 := rkfixed(θ4, 0, 6, 1000, D4)
θ3 := Z3[:, 1]
θ4 := Z4[:, 1]
θ3 := θ3*180/π
υ3 := Z3[:, 2]
θ4 := θ4*180/π
υ4 := Z4[:, 2]
# [plot: θ3, θ4 vs t]
# Колебания без затухания при θ=40°
θ5 := [40 deg; 0]
ω5 := 3
θ6 := [40 deg; 0]
ω6 := 3
D5(t, θ) := [θ[1]; -(ω5^2)*sin(θ[0])]
D6(t, θ) := [θ[1]; -(ω6^2)*θ[0]]
Z5 := rkfixed(θ5, 0, 6, 1000, D5)
Z6 := rkfixed(θ6, 0, 6, 1000, D6)
θ5 := Z5[:, 1]
θ6 := Z6[:, 1]
θ5 := θ5*180/π
υ5 := Z5[:, 2]
θ6 := θ6*180/π
υ6 := Z6[:, 2]
# [plot: θ5, θ6 vs t]
# Колебания без затухания при θ=60°
θ7 := [60 deg; 0]
ω7 := 3
θ8 := [60 deg; 0]
ω8 := 3
D7(t, θ) := [θ[1]; -(ω7^2)*sin(θ[0])]
D8(t, θ) := [θ[1]; -(ω8^2)*θ[0]]
Z7 := rkfixed(θ7, 0, 6, 1000, D7)
Z8 := rkfixed(θ8, 0, 6, 1000, D8)
θ7 := Z7[:, 1]
θ8 := Z8[:, 1]
θ7 := θ7*180/π
υ7 := Z7[:, 2]
θ8 := θ8*180/π
υ8 := Z8[:, 2]
# [plot: θ7, θ8 vs t]
# Фазовый портрет
# [plot: υ1, υ2, υ3, υ4, υ5, υ6, υ7, υ8 vs θ1, θ2, θ3, θ4, θ5, θ6, θ7, θ8]
# Колебания с затуханием при θ=20°
θ1 := [20 deg; 0]
ω1 := 3
k1 := 0.25
θ2 := [20 deg; 0]
ω2 := 3
k2 := 0.75
D1(t, θ) := [θ[1]; -(ω1^2)*sin(θ[0]) - k1*θ[1]]
D2(t, θ) := [θ[1]; -(ω2^2)*sin(θ[0]) - k2*θ[1]]
Z1 := rkfixed(θ1, 0, 50, 1000, D1)
Z2 := rkfixed(θ2, 0, 50, 1000, D2)
t := Z1[:, 0]
θ1 := Z1[:, 1]
θ2 := Z2[:, 1]
θ1 := θ1*180/π
υ1 := Z1[:, 2]
θ2 := θ2*180/π
υ2 := Z2[:, 2]
# [plot: θ1, θ2 vs t]
# [plot: υ1, υ2 vs θ1]
# Фазовый портрет
# Колебания с затуханием при θ=40°
θ1 := [40 deg; 0]
ω1 := 3
k1 := 0.25
θ2 := [40 deg; 0]
ω2 := 3
k2 := 0.75
D1(t, θ) := [θ[1]; -(ω1^2)*sin(θ[0]) - k1*θ[1]]
D2(t, θ) := [θ[1]; -(ω2^2)*sin(θ[0]) - k2*θ[1]]
Z1 := rkfixed(θ1, 0, 50, 2000, D1)
Z2 := rkfixed(θ2, 0, 50, 2000, D2)
θ1 := Z1[:, 1]
t := Z1[:, 0]
θ2 := Z2[:, 1]
θ1 := θ1*180/π
υ1 := Z1[:, 2]
θ2 := θ2*180/π
υ2 := Z2[:, 2]
# [plot: θ1, θ2 vs t]
# Фазовый портрет
# [plot: υ1, υ2 vs θ1, θ2]
# Вынужденные колебания
θ1 := [0 deg; 0]
ω0 := 3
k1 := 0.25
a := 1
ω1 := 3
D1(t, θ) := [θ[1]; -(ω0^2)*sin(θ[0]) - k1*θ[1] + a*sin(ω1*t)]
Z1 := rkfixed(θ1, 0, 50, 1000, D1)
θ1 := Z1[:, 1]
t := Z1[:, 0]
θ1 := θ1*180/π
υ1 := Z1[:, 2]
# [plot: θ1 vs t]
n := 1000
V := 0, 0.001 .. 3 = [
    0
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]
ω1 := V*ω0
A4 :=
    i ← 0
    while i < length(ω1)
        A[i] ← a/sqrt((ω0^2 - ω1[i]^2)^2 + 0.16*4*ω1[i]^2)
        i ← i + 1
    A
A1 :=
    i ← 0
    while i < length(ω1)
        A[i] ← a/sqrt((ω0^2 - ω1[i]^2)^2 + 0.01*4*ω1[i]^2)
        i ← i + 1
    A
A4 := A4*180/π
A1 := A1*180/π
A2 :=
    i ← 0
    while i < length(ω1)
        A[i] ← a/sqrt((ω0^2 - ω1[i]^2)^2 + 0.04*4*ω1[i]^2)
        i ← i + 1
    A
A3 :=
    i ← 0
    while i < length(ω1)
        A[i] ← a/sqrt((ω0^2 - ω1[i]^2)^2 + 0.09*4*ω1[i]^2)
        i ← i + 1
    A
A2 := A2*180/π
A3 := A3*180/π
A5 :=
    i ← 0
    while i < length(ω1)
        A[i] ← a/sqrt((ω0^2 - ω1[i]^2)^2 + 0.25*4*ω1[i]^2)
        i ← i + 1
    A
A6 :=
    i ← 0
    while i < length(ω1)
        A[i] ← a/sqrt((ω0^2 - ω1[i]^2)^2 + 0.64*4*ω1[i]^2)
        i ← i + 1
    A
A5 := A5*180/π
A6 := A6*180/π
A7 :=
    i ← 0
    while i < length(ω1)
        A[i] ← a/sqrt((ω0^2 - ω1[i]^2)^2 + 2*4*ω1[i]^2)
        i ← i + 1
    A
A8 :=
    i ← 0
    while i < length(ω1)
        A[i] ← a/sqrt((ω0^2 - ω1[i]^2)^2 + 16*4*ω1[i]^2)
        i ← i + 1
    A
A7 := A7*180/π
A8 := A8*180/π
A9 :=
    i ← 0
    while i < length(ω1)
        A[i] ← a/sqrt((ω0^2 - ω1[i]^2)^2 + 64*4*ω1[i]^2)
        i ← i + 1
    A
A9 := A9*180/π
# [plot: A1, A2, A3, A4, A5, A6, A7, A8, A9 vs ω1/ω0]
