Ω := 1
Ω1 := 1
V := [5; 3; 4; 4]
V1 := [5; 3; 5; 5]
D(t, V) := [V[2]; V[3]; 2*Ω*V[3]; -2*Ω*V[2]]
D1(t, V) := [V[2]; V[3]; 2*Ω*V[3]; -2*Ω*V[2]]
Z := rkfixed(V, 0, 100, 1000, D)
Z1 := rkfixed(V1, 0, 100, 1000, D1)
t := Z[:, 0]
x := Z[:, 1]
y := Z[:, 2]
x1 := Z1[:, 1]
y1 := Z1[:, 2]
v := Z[:, 3]
u := Z[:, 4]
v1 := Z1[:, 3]
u1 := Z1[:, 4]
Ω2 := 1.5
Ω3 := 0.5
V2 := [5; 3; 4; 4]
V3 := [5; 3; 5; 5]
D2(t, V) := [V[2]; V[3]; 2*Ω2*V[3]; -2*Ω2*V[2]]
D3(t, V) := [V[2]; V[3]; 2*Ω3*V[3]; -2*Ω3*V[2]]
Z2 := rkfixed(V2, 0, 100, 1000, D2)
Z3 := rkfixed(V3, 0, 100, 1000, D3)
x2 := Z2[:, 1]
y2 := Z2[:, 2]
x3 := Z3[:, 1]
y3 := Z3[:, 2]
v2 := Z2[:, 3]
u2 := Z2[:, 4]
v3 := Z3[:, 3]
u3 := Z3[:, 4]
# [plot: y, y1, y2, y3 vs x, x1, x2, x3]
# [plot: u^2/2 + v^2/2, u1^2/2 + v1^2/2 vs t]
# [plot: u2^2/2 + v2^2/2, u3^2/2 + v3^2/2 vs t]
